// SBML level 3 version 2

function preprocess(c)
  1*log10(1 + c/1);
end

function heaviside(x)
  piecewise(1, x > 0, 0);
end

model dictyostelium_qs()
  // model units - time: second, area: area

  // Compartments:
  compartment SIM_SPACE;

  // Species:
  species AUTO_cAMP in SIM_SPACE;
  species CELL_dict in SIM_SPACE;

  // Parameters:
  CELL_dict_activator = ;
  CELL_dict_repressor = ;
  CELL_output = ;
  fhn_epsilon = 0;
  fhn_gamma = 0;
  fhn_c = 0;
  AUTO_cAMP_inflow = 0;
  AUTO_cAMP_outflow = 0;
  AUTO_cAMP_CELL_dict_base_amount = 0;
  AUTO_cAMP_CELL_dict_output_amount = 0;

  // Initial assignments:
  activator = 0;
  repressor = 0;
  cAMP = 0;

  // Rate rules:
  CELL_dict_activator' = activator + (-0.333333*activator^3) + (-1*repressor) + preprocessor(cAMP) + stoich();
  CELL_dict_repressor' = fhn_epsilon*(activator> + (-1*fhn_gamma*repressor) + fhn_c);
  CELL_output' = heaviside(CELL_activator);
  AUTO_cAMP' = AUTO_cAMP_inflow + AUTO_cAMP_CELL_dict_base_amount + AUTO_cAMP_CELL_dict_output_amount*CELL_output + (-1*AUTO_cAMP_outflow*AUTO_cAMP);
end
